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/BATCH
/COM,ANSYS RELEASE 2024 R2           BUILD 24.2      UP20240513       12:14:22
/input,menust,tmp,''
/GST,ON
/PLO,INFO,3
/GRO,CURL,ON
/CPLANE,1
WPSTYLE,,,,,,,,0
/PREP7
RECTNG,-250,250,,800/2,
wpstyle,5,0.1,-1,1,0.003,0,2,,5
wpof,10.000000
PCIRC,50, ,0,180,
wpof,-45.000000
PCIRC,25, ,0,180,
